// COMSOL Multiphysics 4.4.0.195 model "P2DImpedance.mph"
// Outline of the model tree
// Components: comp1 "Macroscopic", comp2 "Microscopic"

Parameters
  l_neg = 88e-6[m]
  l_sep = 25e-6[m]
  l_pos = 80e-6[m]
  Rp_neg = 2e-6[m]
  Rp_pos = 2e-6[m]
  epsilon_f_neg = .0326
  epsilon_f_pos = .025
  epsilon_neg = .485
  epsilon_sep = .724
  epsilon_pos = .385
  Brugg = 4
  c0 = 1000[mol/m^3]
  Cdl_neg = 10[uF/cm^2]
  Cdl_pos = 10[uF/cm^2]
  D = 7.5e-10[m^2/s]
  Ds_neg = 3.9e-14[m^2/s]
  Ds_pos = 1e-14[m^2/s]
  i0_neg = 3.30[A/m^2]
  i0_pos = 3.67[A/m^2]
  tP = .364
  aa_neg = .5
  aa_pos = .5
  kappa_0 = 0.204737[S/m]
  sigma_neg = 100[S/m]
  sigma_pos = 100[S/m]
  dUdcp_pos = -11.6724[V*cm^3/mol]
  dUdcp_neg = -3.21038[V*cm^3/mol]
  d2Udcp2_pos = 643.371[V*cm^6/mol^2]
  d2Udcp2_neg = -281.56[V*cm^6/mol^2]
  d3Udcp3_pos = -177808[V*cm^9/mol^3]
  d3Udcp3_neg = 2222.82[V*cm^9/mol^3]
  R = 8.314[J/mol/K]
  T = 298.15[K]
  F = 96487[C/mol]
  f = 1[Hz]

Variables
  var2 "Negative" [comp1] on domains 1
    epsilon = epsilon_neg
    epsilon_f = epsilon_f_neg
    a = (3/Rp_neg)*(1-epsilon-epsilon_f)
    aa = aa_neg
    ac = ac_neg
    Deff = D*(epsilon^Brugg)
    sigmaeff = sigma_neg*(1-epsilon-epsilon_f)^Brugg
    kappaeff = kappa_0*(epsilon^Brugg)
    Cdl = Cdl_neg
    i0 = i0_neg
    dUdcp = dUdcp_neg
    cpc11_s = comp2.linext_neg(comp2.cpc11)
    cps11_s = comp2.linext_neg(comp2.cps11)
    jfc11 = -(((aa + ac)*i0*(dUdcp*cpc11_s + phi2c11 - phi1c11))/(R*T))
    jfs11 = -(((aa + ac)*i0*(dUdcp*cps11_s + phi2s11 - phi1s11))/(R*T))
    jdlc11 = (Cdl*omega*(-phi2s11 + phi1s11))/F
    jdls11 = (Cdl*omega*(phi2c11 - phi1c11))/F
  var3 "Separator" [comp1] on domains 2
    epsilon = epsilon_sep
    a = 0
    Deff = D*epsilon^Brugg
    kappaeff = kappa_0*(epsilon^Brugg)
    sigmaeff = 0
    Cdl = 0
    jfc11 = 0[mol/s/m^2]
    jfs11 = 0[mol/s/m^2]
    jdlc11 = 0[mol/s/m^2]
    jdls11 = 0[mol/s/m^2]
    dUdcp = 0
    i0 = 0
    cpc11_s = 0
    cps11_s = 0
    i2c11 = -1
    i2s11 = 0[A/m^2]
  var4 "Positive" [comp1] on domains 3
    epsilon = epsilon_pos
    epsilon_f = epsilon_f_pos
    a = (3/Rp_pos)*(1-epsilon-epsilon_f)
    aa = aa_pos
    ac = ac_pos
    Deff = D*(epsilon^Brugg)
    sigmaeff = sigma_pos*(1-epsilon-epsilon_f)^Brugg
    kappaeff = kappa_0*(epsilon^Brugg)
    Cdl = Cdl_pos
    i0 = i0_pos
    dUdcp = dUdcp_pos
    cpc11_s = comp2.linext_pos(comp2.cpc11)
    cps11_s = comp2.linext_pos(comp2.cps11)
    jfc11 = -(((aa + ac)*i0*(dUdcp*cpc11_s + phi2c11 - phi1c11))/(R*T))
    jfs11 = -(((aa + ac)*i0*(dUdcp*cps11_s + phi2s11 - phi1s11))/(R*T))
    jdlc11 = (Cdl*omega*(-phi2s11 + phi1s11))/F
    jdls11 = (Cdl*omega*(phi2c11 - phi1c11))/F
  var6 "Negative" [comp2] on domains 1
    D_s = Ds_neg
    R_p = Rp_neg
  var7 "Positive" [comp2] on domains 2
    D_s = Ds_pos
    R_p = Rp_pos
  var8 "Derivatives" [comp1]
    dcc11 = d(cc11,x)
    ddcc11 = d(dcc11,x)
    dcs11 = d(cs11,x)
    ddcs11 = d(dcs11,x)
  var10 "Transfer Coefficients"
    ac_neg = 1 - aa_neg
    ac_pos = 1 - aa_pos
  var11 "Frequency"
    omega = 2*pi*f

Couplings
  linext5: LinearExtrusion "Top_Left" on boundaries 3
    opname = linext_neg
    srcvertex1 = points 2
    srcvertex2 = points 4
    dstvertex1 = boundaries 1
    dstvertex2 = boundaries 2
    dstgeom = geom1
  linext6: LinearExtrusion "Top_Right" on boundaries 7
    opname = linext_pos
    srcvertex1 = points 6
    srcvertex2 = points 8
    dstvertex1 = boundaries 3
    dstvertex2 = boundaries 4
    dstgeom = geom1
  linext7: LinearExtrusion "negPE" on domains 1
    opname = linext_neg
    srcvertex1 = boundaries 1
    srcvertex2 = boundaries 2
    dstvertex1 = points 2
    dstvertex2 = points 4
    dstgeom = geom2
  linext8: LinearExtrusion "posPE" on domains 3
    opname = linext_pos
    srcvertex1 = boundaries 3
    srcvertex2 = boundaries 4
    dstvertex1 = points 6
    dstvertex2 = points 8
    dstgeom = geom2

Probes
  pdom1: DomainPoint "x = L" [comp1] | bndsnap1 = on
    ppb1: PointExpr "phic11_L" | probename = probe_phic11_L; expr = phi1c11; unit = V; table = tbl4
    ppb3: PointExpr "phis11_L" | probename = probe_phis11_L; expr = phi1s11; unit = V; table = tbl4
  pdom2: DomainPoint "x = 0" [comp1]
    ppb2: PointExpr "phic11_0" | probename = probe_phic11_0; expr = phi1c11; unit = V; table = tbl4
    ppb4: PointExpr "phis11_0" | probename = probe_phis11_0; expr = phi1s11; unit = V; table = tbl4
  var1: GlobalVariable "V_11_real" [comp1] | probename = Vc11; expr = probe_phic11_L-probe_phic11_0; table = tbl5
  var2: GlobalVariable "V_11_imag" [comp1]
    probename = Vs11
    expr = probe_phis11_L-probe_phis11_0
    unit = V
    table = tbl5

Geometry
  geom1 "Geometry 1" [comp1] (1D, length unit m)
    i1: Interval "Anode" | p2 = l_neg; p = {0, l_neg}
    i2: Interval "Separator" | p1 = l_neg; p2 = l_neg+l_sep; p = {l_neg, l_neg+l_sep}
    i3: Interval "Cathode" | p1 = l_neg+l_sep; p2 = l_neg+l_sep+l_pos; p = {l_neg+l_sep, l_neg+l_sep+l_pos}
    fin: Finalize "Form Union"
  geom2 "Geometry 2" [comp2] (2D, length unit m)
    r1: Rectangle "Negative_Scaled" | size = {l_neg, Rp_neg}
    r2: Rectangle "Positive_Scaled" | pos = {l_neg+l_sep, 0}; size = {l_pos, Rp_pos}
    r3: Rectangle "Negative" (disabled) | size = {l_neg, R_pneg}
    r4: Rectangle "Positive" (disabled) | pos = {l_neg+l_sep, 0}; size = {l_pos, R_ppos}
    fin: Finalize "Form Union"

Physics
  c: CoefficientFormPDE "ceqn1c" [geom1] on all domains
    dependent variable cc11
    Units.DependentVariableQuantity = concentration
    Units.SourceTermQuantity = reactionrate
    Units.CustomSourceTermUnit = mol/m^5
    cfeq1: CoefficientFormPDE (default) | c = -Deff; f = (epsilon*omega*cs11 + a*(-1 + tP)*(jdlc11 + jfc11)); da = 0
    zflx1: ZeroFluxBoundary "Zero Flux 1" (default)
    init1: init "Initial Values 1" (default)
  phys1: CoefficientFormPDE "ceqn1s" [geom1] on all domains
    dependent variable cs11
    Units.DependentVariableQuantity = concentration
    Units.SourceTermQuantity = reactionrate
    Units.CustomSourceTermUnit = mol/m^5
    cfeq1: CoefficientFormPDE (default) | c = -Deff; f = (-(epsilon*omega*cc11) + a*(-1 + tP)*(jdls11 + jfs11)); da = 0
    zflx1: ZeroFluxBoundary "Zero Flux 1" (default)
    init1: init "Initial Values 1" (default)
  phys43: CoefficientFormPDE "i2eqn1c" [geom1] on domains 1, 3
    dependent variable i2c11
    Units.DependentVariableQuantity = currentdensity
    Units.SourceTermQuantity = currentsource
    cfeq1: CoefficientFormPDE (default) | c = 0; f = a*F*(jdlc11 + jfc11); da = 0; be = 1
    zflx1: ZeroFluxBoundary "Zero Flux 1" (default)
    init1: init "Initial Values 1" (default)
    dir1: DirichletBoundary "Dirichlet Boundary Condition 1" on boundaries 2, 3 | r = -1
    dir2: DirichletBoundary "Dirichlet Boundary Condition 2" on boundaries 1, 4 | r = 0
  phys44: CoefficientFormPDE "i2eqn1s" [geom1] on domains 1, 3
    dependent variable i2s11
    Units.DependentVariableQuantity = currentdensity
    Units.SourceTermQuantity = currentsource
    cfeq1: CoefficientFormPDE (default) | c = 0; f = a*F*(jdls11 + jfs11); da = 0; be = 1
    zflx1: ZeroFluxBoundary "Zero Flux 1" (default)
    init1: init "Initial Values 1" (default)
    dir1: DirichletBoundary "Dirichlet Boundary Condition 1" on boundaries 1-4 | r = 0
  c2: CoefficientFormPDE "phi2eqn1c" [geom1] on domains 1-3
    dependent variable phi2c11
    Units.DependentVariableQuantity = electricpotential
    Units.SourceTermQuantity = currentdensity
    Units.CustomSourceTermUnit = V/m^2
    cfeq1: CoefficientFormPDE (default)
      c = 0
      f = -(i2c11) - (2*kappaeff*R*T*(-1 + tP)*d(cc11,x))/(c0*F)
      da = 0
      be = kappaeff
    zflx1: ZeroFluxBoundary "Zero Flux 1" (default)
    init1: init "Initial Values 1" (default)
    dir1: DirichletBoundary "Dirichlet Boundary Condition 1" on boundaries 1 | r = 0
    cons1: Constraint on boundaries 4 | R = -kappaeff*d(phi2c11,x) + 2*kappaeff*R*T*(1-tP)*d(cc11,x)/(c0*F)
  phys2: CoefficientFormPDE "phi2eqn1s" [geom1] on domains 1-3
    dependent variable phi2s11
    Units.DependentVariableQuantity = electricpotential
    Units.SourceTermQuantity = currentdensity
    Units.CustomSourceTermUnit = V/m^2
    cfeq1: CoefficientFormPDE (default)
      c = 0
      f = -(i2s11) - (2*kappaeff*R*T*(-1 + tP)*d(cs11,x))/(c0*F)
      da = 0
      be = kappaeff
    zflx1: ZeroFluxBoundary "Zero Flux 1" (default)
    init1: init "Initial Values 1" (default)
    dir1: DirichletBoundary "Dirichlet Boundary Condition 1" on boundaries 1 | r = 0
    cons1: Constraint on boundaries 4 | R = -kappaeff*d(phi2s11,x) + 2*kappaeff*R*T*(1-tP)*d(cs11,x)/(c0*F)
  c3: CoefficientFormPDE "phi1eqn1c" [geom1] on domains 1, 3
    dependent variable phi1c11
    Units.DependentVariableQuantity = electricpotential
    Units.SourceTermQuantity = currentdensity
    Units.CustomSourceTermUnit = V/m^2
    cfeq1: CoefficientFormPDE (default) | c = 0; f = (1 + i2c11); da = 0; be = sigmaeff
    zflx1: ZeroFluxBoundary "Zero Flux 1" (default)
    init1: init "Initial Values 1" (default)
    cons1: Constraint on boundaries 2, 3 | R = d(phi1c11,x)
    cons2: Constraint on boundaries 1, 4 | R = sigmaeff*d(phi1c11,x) - 1
  phys3: CoefficientFormPDE "phi1eqn1s" [geom1] on domains 1, 3
    dependent variable phi1s11
    Units.DependentVariableQuantity = electricpotential
    Units.SourceTermQuantity = currentdensity
    Units.CustomSourceTermUnit = V/m^2
    cfeq1: CoefficientFormPDE (default) | c = 0; f = i2s11; da = 0; be = sigmaeff
    zflx1: ZeroFluxBoundary "Zero Flux 1" (default)
    init1: init "Initial Values 1" (default)
    cons1: Constraint on boundaries 1-4 | R = d(phi1s11,x)
  phys37: CoefficientFormPDE "cpeqn1c" [geom2] on all domains
    dependent variable cpc11
    Units.DependentVariableQuantity = concentration
    Units.CustomSourceTermUnit = mol/m/s
    cfeq1: CoefficientFormPDE (default) | c = {0, 0, 0, 0}; f = (y^2)*omega*cps11; da = 0; ga = {0, D_s*y^2*d(cpc11,y)}
    zflx1: ZeroFluxBoundary "Zero Flux 1" (default)
    init1: init "Initial Values 1" (default)
    flux1: FluxBoundary "Flux/Source 1" on boundaries 3 | g = (Rp_neg^2)*comp1.linext_neg(comp1.jfc11)
    flux2: FluxBoundary "Flux/Source 2" on boundaries 7 | g = (Rp_pos^2)*comp1.linext_pos(comp1.jfc11)
  phys38: CoefficientFormPDE "cpeqn1s" [geom2] on all domains
    dependent variable cps11
    Units.DependentVariableQuantity = concentration
    Units.CustomSourceTermUnit = mol/m/s
    cfeq1: CoefficientFormPDE (default) | c = {0, 0, 0, 0}; f = -(y^2)*omega*cpc11; da = 0; ga = {0, D_s*y^2*d(cps11,y)}
    zflx1: ZeroFluxBoundary "Zero Flux 1" (default)
    init1: init "Initial Values 1" (default)
    flux1: FluxBoundary "Flux/Source 1" on boundaries 3 | g = (Rp_neg^2)*comp1.linext_neg(comp1.jfs11)
    flux2: FluxBoundary "Flux/Source 2" on boundaries 7 | g = (Rp_pos^2)*comp1.linext_pos(comp1.jfs11)

Mesh
  mesh1 "Mesh 1" [geom1]
    size: MeshSizeDefault | hmax = 1E-6; hmin = 9.86E-9; hauto = 1; custom = on
    edg1: Edge on entire geometry
      dis1: Distribution on domains 3 | type = predefined; elemcount = 100; elemratio = 50
      dis2: Distribution on domains 2 | type = predefined; elemcount = 50; elemratio = 25; symmetric = on
      dis3: Distribution on domains 1 | type = predefined; elemcount = 100; elemratio = 50; reverse = on
  mesh10 "Mesh" [geom2]
    size: MeshSizeDefault | hauto = 1
    edg4: Edge "Horiz_Pos" on boundaries 6, 7
      size1: Size (disabled) on boundaries 6, 7 | hmax = l_pos/100; hauto = 5; custom = on
      dis1: Distribution on boundaries 6, 7 | type = predefined; elemcount = 100; elemratio = 50; reverse = on
    edg2: Edge "Horiz_Neg" on boundaries 2, 3
      size1: Size (disabled) on boundaries 2, 3 | hmax = l_pos/100; hauto = 5; custom = on
      dis1: Distribution on boundaries 2, 3 | type = predefined; elemcount = 100; elemratio = 50
    edg5: Edge on boundaries 5, 8
      dis1: Distribution on boundaries 5, 8
        type = predefined
        elemcount = 40
        elemratio = 1.5
        method = geometric
        reverse = on
    edg3: Edge on boundaries 1, 4
      dis1: Distribution on boundaries 1, 4
        type = predefined
        elemcount = 40
        elemratio = 1.5
        method = geometric
        reverse = on
    map1: Map "Mapped 1" on entire geometry

Studies
  std1 "Study 1"
    param: Parametric "Parametric Sweep" | pname = f; plistarr = 10^6 10^5
    stat: Stationary "Stationary, Linear Harmonics (1,1)"

Solver configurations
  sol1 "Solver 1" (study std1)
    v1: Variables "Dependent Variables 1"
    s1: Stationary "Stationary Solver 1"
      dDef: Direct
      fc1: FullyCoupled
      p1: Parametric | pname = f; plistarr = 10^6 10^5; pcontinuationmode = no

Datasets
  an1_ds1: Function1D | function = all; par1 = x
  dset1: Solution | solution = sol1
  dset2: Solution | solution = sol1
  dset7: Solution "Probe Solution 7" | solution = sol1
  cpt1: CutPoint1D "x = L" | data = dset7; pointx = l_neg+l_sep+l_pos
  cpt2: CutPoint1D "x = 0" | data = dset7

Derived values
  pev1: EvalPoint "phic11_L" | data = cpt1; table = tbl4; expr = phi1c11
  pev2: EvalPoint "phis11_L" | data = cpt1; table = tbl4; expr = phi1s11
  pev7: EvalPoint "phic11_0" | data = cpt2; table = tbl4; expr = phi1c11
  pev8: EvalPoint "phis11_0" | data = cpt2; table = tbl4; expr = phi1s11
  gev1: EvalGlobal "V_11_real" | data = dset7; table = tbl5; expr = probe_phic11_L-probe_phic11_0
  gev2: EvalGlobal "V_11_imag" | data = dset7; table = tbl5; expr = probe_phis11_L-probe_phis11_0